// SBML level 3 version 2
// Created with https://github.com/matthiaskoenig/sbmlutils.

model BIOMD0000000012_promoted()
  // Elowitz2000 - Repressilator

  // Compartments:
  compartment cell = 1;  // SBO:0000290

  // Species:
  substanceOnly species PX in cell = 0; PX is "LacI protein";  // SBO:0000252
  substanceOnly species PY in cell = 0; PY is "TetR protein";  // SBO:0000252
  substanceOnly species PZ in cell = 0; PZ is "cI protein";  // SBO:0000252
  substanceOnly species X in cell = 0; X is "LacI mRNA";  // SBO:0000250
  substanceOnly species Y in cell = 20; Y is "TetR mRNA";  // SBO:0000250
  substanceOnly species Z in cell = 0; Z is "cI mRNA";  // SBO:0000250

  // Parameters:
  eff = 20; eff is "translation efficiency";
  n = 2;  // SBO:0000190
  KM = 40;  // SBO:0000288
  tau_mRNA = 2; tau_mRNA is "mRNA half life";  // SBO:0000332
  tau_prot = 10; tau_prot is "protein half life";  // SBO:0000332
  var t_ave; t_ave is "average mRNA life time";  // SBO:0000348
  ps_a = 0.5; ps_a is "tps_active";  // SBO:0000186
  ps_0 = 0.0005; ps_0 is "tps_repr";  // SBO:0000485

  // Assignment rules:
  t_ave := tau_mRNA/ln(2);
  beta := tau_mRNA/tau_prot;
  k_tl := eff/t_ave;
  a_tr := (ps_a - ps_0)*60;
  a0_tr := ps_0*60;
  kd_prot := ln(2)/tau_prot;
  kd_mRNA := ln(2)/tau_mRNA;
  alpha := a_tr*eff*tau_prot/(ln(2)*KM);
  alpha0 := a0_tr*eff*tau_prot/(ln(2)*KM);

  // Reactions:
  degradation_of_LacI_transcripts: X => ; kd_mRNA*X;  // SBO:0000179
  degradation_of_TetR_transcripts: Y => ; kd_mRNA*Y;  // SBO:0000179
  degradation_of_CI_transcripts: Z => ; kd_mRNA*Z;  // SBO:0000179
  translation_of_LacI: => PX; k_tl*X;  // modifiers: X; SBO:0000184
  translation_of_TetR: => PY; k_tl*Y;  // modifiers: Y; SBO:0000184
  translation_of_CI: => PZ; k_tl*Z;  // modifiers: Z; SBO:0000184
  degradation_of_LacI: PX => ; kd_prot*PX;  // SBO:0000179
  degradation_of_TetR: PY => ; kd_prot*PY;  // SBO:0000179
  degradation_of_CI: PZ => ; kd_prot*PZ;  // SBO:0000179
  transcription_of_LacI: => X; a0_tr + a_tr*KM^n/(KM^n + PZ^n);  // modifiers: PZ; SBO:0000183
  transcription_of_TetR: => Y; a0_tr + a_tr*KM^n/(KM^n + PX^n);  // modifiers: PX; SBO:0000183
  transcription_of_CI: => Z; a0_tr + a_tr*KM^n/(KM^n + PY^n);  // modifiers: PY; SBO:0000183
end
