// SBML level 3 version 1

function max(x, y)
  piecewise(x, x > y, y);
end
max is "minimum";

function min(x, y)
  piecewise(x, x < y, y);
end
min is "maximum";

function heav(x)
  piecewise(0, x < 0, 0.5, x == 0, 1, x > 0, 0);
end
heav is "heavyside";

function mod(x, y)
  piecewise(x - y*ceil(x/y), xor(x < 0, y < 0), x - y*floor(x/y));
end
mod is "modulo";

function inff(vv, theta, sigma, minx)
  minx + (1 - minx)/(1 + exp((theta - vv)/sigma));
end

function mtadjf(temp0, mq10, mtemp1)
  mq10^((mtemp1 - temp0)/10);
end

function mtauf_omp(v, tau0, vtau, ktau)
  tau0/(exp(-(v - vtau)/ktau) + exp((v - vtau)/ktau));
end

function gtauf(vv, tau0, tau1, phi, s0, s1)
  tau0 + (tau1 - tau0)/(exp((phi - vv)/s0) + exp((phi - vv)/s1));
end

function gtau_sf(vv, a, b, k)
  (a*vv + b)/(1 - exp((vv + b/a)/k));
end

model main()
  // XPP model
  // This model was converted from XPP ode format to SBML using sbmlutils-0.1.5a6.
  // #### Implemented by Tim C. Whalen (tim@timcwhalen.com) Mar 2016
  // ### Conductance-based model of pallidostriatal microcircuit
  // ### Connects FSI model from Golomb et al 2007, GPe model from
  // ### Fujita 2011, and MSN model from Mahon 2000, with minor changes
  // ### Adds GABA synapses, passive excitation (constant or oscillating, line 686)
  // ### TO RUN:
  // ## In control case, change last table to "conntableF2Mv3.txt"
  // ## set DD = 0
  // ## In DD case, change last table to "conntableF2MDDv3.txt"
  // ## set DD = 1
  // ##
  // ## Change "v3" to v1 or v2 to use other connectivity tables
  // ## Table files should be in XPP home directory
  // ## In command line, execute "xppaut Corbit_2016_basic_PS.ode -silent"
  // ## Output will be .dat file with filename specified in option at end of file
  // ## .dat file contains one row for each timestep, with columns "t MV1..40 GV1..8 FV1..8"
  // ##
  // ## Note that initial conditions are set randomly near end of file where ODEs appear
  // ### Connectivity Tables ###
  // table con_m2m conntableM2Mv3.txt
  // table con_g2g conntableG2Gv3.txt
  // table con_f2f conntableF2Fv3.txt
  // table con_m2g conntableM2Gv3.txt
  // table con_g2f conntableG2Fv3.txt
  // table con_f2m conntableF2Mv3.txt
  // p DD = 0
  // ### Global Functions
  // # Function for steady states - additional "min" parameter acts as partial inactivation
  // INFF(VV,theta,sigma,minx) = minx + (1.0-minx)/(1.0+exp((theta-VV)/sigma))
  // ### MSN's ###
  // ## Time constant calculations
  // # Inc. 1/tadj_fac as necessary for current to adjust to 37 from exp. temp
  // MTADJF(temp0) = Mq10^((Mtemp1-temp0)/10)
  // MTAUF_OMP(V,tau0,Vtau,ktau) = tau0/(exp(-(V-Vtau)/ktau)+exp((V-Vtau)/ktau))
  // # Constants for temperature adjustment. Temps in C
  // p Mq10 = 2.5
  // p Mtemp1 = 37
  // # Capacitance, uF/cm^2
  // p MCm = 1
  // ## Current values/functions ##
  // # All currents in uA/cm^2
  // # conductances in mS/cm^2
  // # potentials in mV
  // # time in ms
  // # Gating IC's rounded to nearest 0.05 to steady state value at given voltage IC, except when noted
  // ## Applied current
  // # Values previously used for excitation; now replaced with passive channel
  // p MIapp = 0
  // ## Leak Current; passive
  // p MV_L = -90
  // p Mg_leak = .075
  // ## Na Current (exception; also no temp change)
  // p MV_na = 55
  // p Mg_na = 35
  // p MVa_m_na = -28, MKa_m_na = 1
  // p MVb_m_na = -53, MKb_m_na = 18
  // p MVa_h_na = -51, MKa_h_na = 20
  // p MVb_h_na = -21, MKb_h_na = 1
  // p Mph_h_na = 5
  // Ma_m_na[1..40] = (-0.1*(MV[j]-MVa_m_na)/MKa_m_na/(exp(-0.1*(MV[j]-MVa_m_na)/MKa_m_na)-1))
  // Mb_m_na[1..40] = 4*exp(-(MV[j]-MVb_m_na)/MKb_m_na)
  // Ma_h_na[1..40] = 0.07*exp(-(MV[j]-MVa_h_na)/MKa_h_na)
  // Mb_h_na[1..40] = 1/(1+exp(-0.1*(MV[j]-MVb_h_na)/MKb_h_na))
  // Mm_na[1..40] = Ma_m_na[j]/(Ma_m_na[j]+Mb_m_na[j])
  // aux Mm_naa[1..40] = Mm_na[j]
  // Mhnf_na[1..40] = Ma_h_na[j]/(Ma_h_na[j]+Mb_h_na[j])
  // Mh_na[1..40](0) = 1
  // Mh_na[1..40]' = Mph_h_na*(Ma_h_na[j]*(1-Mh_na[j])-Mb_h_na[j]*Mh_na[j])
  // ## K Current (exception; also no temp change)
  // p MV_k = -90
  // p Mg_k = 6
  // p MVa_n_k = -27, MKa_n_k = 1
  // p MVb_n_k = -37, MKb_n_k = 80
  // p Mph_n_k = 5
  // Ma_n_k[1..40] = (-0.01*(MV[j]-MVa_n_k)/MKa_n_k/(exp(-0.1*(MV[j]-MVa_n_k)/MKa_n_k)-1))
  // Mb_n_k[1..40] = 0.125*exp(-(MV[j]-MVb_n_k)/MKb_n_k)
  // Mnnf_k[1..40] = Ma_n_k[j]/(Ma_n_k[j]+Mb_n_k[j])
  // Mn_k[1..40](0) = 0
  // Mn_k[1..40]'=Mph_n_k*(Ma_n_k[j]*(1-Mn_k[j])-Mb_n_k[j]*Mn_k[j])
  // ## Kir Current
  // p MV_kir = -90
  // p Mg_kir = 0.15
  // # activation approximately instantaneous; no temp dependence
  // p Mth_m_kir = -100, Mk_m_kir = -10
  // p MT0_m_kir = .01
  // MT_m_kir = MT0_m_kir
  // Mmnf_kir[1..40] = INFF(MV[j],Mth_m_kir,Mk_m_kir,0)
  // Mm_kir[1..40](0) = 0
  // Mm_kir[1..40]' = (Mmnf_kir[j] - Mm_kir[j])/MT_m_kir
  // ## Kaf Current
  // p MV_kaf = -73
  // p Mg_kaf = .09
  // p Mtemp_kaf = 22
  // p Mth_m_kaf = -33.1, Mk_m_kaf = 7.5
  // p MT0_m_kaf = 1.0
  // p Mth_h_kaf = -70.4, Mk_h_kaf = -7.6
  // p MT0_h_kaf = 25.0
  // MT_m_kaf = MT0_m_kaf/MTADJF(Mtemp_kaf)
  // Mmnf_kaf[1..40] = INFF(MV[j],Mth_m_kaf,Mk_m_kaf,0)
  // Mm_kaf[1..40](0) = 0
  // Mm_kaf[1..40]' = (Mmnf_kaf[j] - Mm_kaf[j])/MT_m_kaf
  // MT_h_kaf = MT0_h_kaf/MTADJF(Mtemp_kaf)
  // Mhnf_kaf[1..40] = INFF(MV[j],Mth_h_kaf,Mk_h_kaf,0)
  // Mh_kaf[1..40](0) = .73
  // Mh_kaf[1..40]' = (Mhnf_kaf[j] - Mh_kaf[j])/MT_h_kaf
  // # Proportionality constant between m_Kaf ove r m_K
  // aux MK_o_Kaf[1..40] = Mn_k[j]/Mm_Kaf[j]
  // aux MK_m_Kaf[1..40] = Mn_k[j]-Mm_Kaf[j]
  // ## Kas Current
  // p MV_kas = -85
  // p Mg_kas = .32
  // p Mtemp_kas = 22
  // p Mth_m_kas = -25.6, Mk_m_kas = 13.3
  // p MT0_m_kas = 131.4
  // p MvT_m_kas = -37.4, MkT_m_kas = 27.3
  // p Mth_h_kas = -78.8, Mk_h_kas = -10.4
  // p MvT_h_kas = -38.2, MkT_h_kas = 28
  // MT_m_kas[1..40] = MTAUF_OMP(MV[j],MT0_m_kas,MvT_m_kas,MkT_m_kas)/MTADJF(Mtemp_kas)
  // Mmnf_kas[1..40] = INFF(MV[j],Mth_m_kas,Mk_m_kas,0)
  // Mm_kas[1..40](0) = 0
  // Mm_kas[1..40]' = (Mmnf_kas[j] - Mm_kas[j])/MT_m_kas[j]
  // # exception for h_kas tau
  // MT_h_kas[1..40] = (1790+2930*exp(-((MV[j]-MvT_h_kas)/MkT_h_kas)^2)*((MV[j]-MvT_h_kas)/MkT_h_kas))/MTADJF(Mtemp_kas)
  // Mhnf_kas[1..40] = INFF(MV[j],Mth_h_kas,Mk_h_kas,0)
  // # IC from Mahon code
  // Mh_kas[1..40](0) = .46
  // Mh_kas[1..40]' = (Mhnf_kas[j] - Mh_kas[j])/MT_h_kas[j]
  // ## Krp Current
  // p MV_krp = -77.5
  // p Mg_krp = 0.42
  // p Mtemp_krp = 22
  // p Mth_m_krp = -13.4, Mk_m_krp = 12.1
  // p MT0_m_krp = 206.2
  // p MvT_m_krp = -53.9, MkT_m_krp = 26.5
  // p Mth_h_krp = -55.0, Mk_h_krp = -19.0
  // p MvT_h_krp = -38.2, MkT_h_krp = 28
  // MT_m_krp[1..40] = MTAUF_OMP(MV[j],MT0_m_krp,MvT_m_krp,MkT_m_krp)/MTADJF(Mtemp_krp)
  // Mmnf_krp[1..40] = INFF(MV[j],Mth_m_krp,Mk_m_krp,0)
  // Mm_krp[1..40](0) = 0
  // Mm_krp[1..40]' = (Mmnf_krp[j] - Mm_krp[j])/MT_m_krp[j]
  // # exception for h_krp tau
  // MT_h_krp[1..40] = 3*(1790+2930*exp(-((MV[j]-MvT_h_krp)/MkT_h_krp)^2)*((MV[j]-MvT_h_krp)/MkT_h_krp))/MTADJF(Mtemp_krp)
  // Mhnf_krp[1..40] = INFF(MV[j],Mth_h_krp,Mk_h_krp,0)
  // # IC from Mahon code
  // Mh_krp[1..40](0) = .7647
  // Mh_krp[1..40]' = (Mhnf_krp[j] - Mh_krp[j])/MT_h_krp[j]
  // ## NaP Current
  // p MV_nap = 45
  // p Mg_nap = 0.02
  // p Mtemp_nap = 22
  // p Mth_m_nap = -47.8, Mk_m_nap = 3.1
  // p MT0_m_nap = 1.0
  // MT_m_nap = MT0_m_nap/MTADJF(Mtemp_nap)
  // Mmnf_nap[1..40] = INFF(MV[j],Mth_m_nap,Mk_m_nap,0)
  // Mm_nap[1..40](0) = 0
  // Mm_nap[1..40]' = (Mmnf_nap[j] - Mm_nap[j])/MT_m_nap
  // ## NaS Current
  // p MV_nas = 40
  // p Mg_nas = 0.11
  // p Mtemp_nas = 21
  // p Mth_m_nas = -16.0, Mk_m_nas = 9.4
  // p MT0_m_nas = 637.8
  // p MvT_m_nas = -33.5, MkT_m_nas = 26.3
  // MT_m_nas[1..40] = MTAUF_OMP(MV[j],MT0_m_nas,MvT_m_nas,MkT_m_nas)/MTADJF(Mtemp_nas)
  // Mmnf_nas[1..40] = INFF(MV[j],Mth_m_nas,Mk_m_nas,0)
  // Mm_nas[1..40](0) = 0
  // Mm_nas[1..40]' = (Mmnf_nas[j] - Mm_nas[j])/MT_m_nas[j]
  // ### GPe Neurons ###
  // ## Time constant calculations
  // # sigma (Fujita) -> s
  // GTAUF(VV,tau0,tau1,phi,s0,s1) = tau0 + (tau1-tau0)/(exp((phi-VV)/s0) + exp((phi-VV)/s1))
  // # For GPe NaP s gate
  // GTAU_SF(VV,A,B,K) = (A*VV+B)/(1-exp((VV+B/A)/K))
  // # Capacitance, uF/cm^2
  // p GCm = 1
  // ## All currents in uA/cm^2
  // # Applied current
  // # Previously used for excitation, replaced with passive channel
  // p GIapp = 0
  // ## Leak Current; passive
  // p GV_L = -60
  // # All conductances in mS/cm^2
  // p Gg_leak = .068
  // # Defaults: mi (min) = 0, ph (phi) = 0, s0,1 = 1
  // ## Na Currents
  // p GV_Na = 50
  // ## NaF Current
  // p Gg_naf = 50
  // p Gth_m_naf = -39, Gk_m_naf = 5.0
  // p GT0_m_naf = 0.028, GT1_m_naf = 0.028
  // p Gph_m_naf = 0, Gmi_m_naf = 0.0
  // p Gs0_m_naf = 1, Gs1_m_naf = 1
  // p Gth_h_naf = -48, Gk_h_naf = -2.8
  // p GT0_h_naf = 0.25, GT1_h_naf = 4.0
  // p Gph_h_naf = -43, Gmi_h_naf = 0.0
  // p Gs0_h_naf = 10, Gs1_h_naf = -5.0
  // p Gth_s_naf = -40, Gk_s_naf = -5.4
  // p GT0_s_naf = 10, GT1_s_naf = 1000
  // p Gph_s_naf = -40, Gmi_s_naf = 0.15
  // p Gs0_s_naf = 18.3, Gs1_s_naf = -10
  // Gmnf_naf[1..8] = INFF(GV[j],Gth_m_naf,Gk_m_naf,Gmi_m_naf)
  // Ghnf_naf[1..8] = INFF(GV[j],Gth_h_naf,Gk_h_naf,Gmi_h_naf)
  // Gsnf_naf[1..8] = INFF(GV[j],Gth_s_naf,Gk_s_naf,Gmi_s_naf)
  // Gm_T_naf[1..8] = GTAUF(GV[j], GT0_m_naf, GT1_m_naf, Gph_m_naf, Gs0_m_naf, Gs1_m_naf)
  // Gh_T_naf[1..8] = GTAUF(GV[j], GT0_h_naf, GT1_h_naf, Gph_h_naf, Gs0_h_naf, Gs1_h_naf)
  // Gs_T_naf[1..8] = GTAUF(GV[j], GT0_s_naf, GT1_s_naf, Gph_s_naf, Gs0_s_naf, Gs1_s_naf)
  // Gm_naf[1..8](0) = 0.02
  // Gh_naf[1..8](0) = 0.97
  // Gs_naf[1..8](0) = 0.97
  // Gm_naf[1..8]' = (Gmnf_naf[j] - Gm_naf[j]) / Gm_T_naf[j]
  // Gh_naf[1..8]' = (Ghnf_naf[j] - Gh_naf[j]) / Gh_T_naf[j]
  // Gs_naf[1..8]' = (Gsnf_naf[j] - Gs_naf[j]) / Gs_T_naf[j]
  // ## NaP Current
  // p Gg_nap = 0.1
  // p Gth_m_nap = -57.7, Gk_m_nap = 5.7
  // p GT0_m_nap = 0.03, GT1_m_nap = 0.146
  // p Gph_m_nap = -42.6, Gmi_m_nap = 0.0
  // p Gs0_m_nap = 14.4, Gs1_m_nap = -14.4
  // p Gth_h_nap = -57, Gk_h_nap = -4
  // p GT0_h_nap = 10, GT1_h_nap = 17
  // p Gph_h_nap = -34, Gmi_h_nap = 0.154
  // p Gs0_h_nap = 26, Gs1_h_nap = -31.9
  // # s gate modulated by different eq's;
  // # REMOVED in reduced version
  // # p Gth_s_nap = -10, Gk_s_nap = -4.9
  // # p Gmi_s_nap = 0
  // # p GAa_s_nap = -.00000288 GBa_s_nap = -.000049
  // # p GAb_s_nap = .00000694 GBb_s_nap = .000447
  // # p GKa_s_nap = 4.63 GKb_s_nap = -2.63
  // Gmnf_nap[1..8] = INFF(GV[j],Gth_m_nap,Gk_m_nap,Gmi_m_nap)
  // Ghnf_nap[1..8] = INFF(GV[j],Gth_h_nap,Gk_h_nap,Gmi_h_nap)
  // #Gsnf_nap[1..8] = INFF(GV[j],Gth_s_nap,Gk_s_nap,Gmi_s_nap)
  // Gm_T_nap[1..8] = GTAUF(GV[j], GT0_m_nap, GT1_m_nap, Gph_m_nap, Gs0_m_nap, Gs1_m_nap)
  // Gh_T_nap[1..8] = GTAUF(GV[j], GT0_h_nap, GT1_h_nap, Gph_h_nap, Gs0_h_nap, Gs1_h_nap)
  // #Gs_T_nap[1..8] = 1/(GTAU_SF(GV[j],GAa_s_nap,GBa_s_nap,GKa_s_nap)+GTAU_SF(GV[j],GAb_s_nap,GBb_s_nap,GKb_s_nap))
  // Gm_nap[1..8](0) = .48
  // Gh_nap[1..8](0) = .68
  // #Gs_nap[1..8](0) = .39
  // Gm_nap[1..8]' = (Gmnf_nap[j] - Gm_nap[j]) / Gm_T_nap[j]
  // Gh_nap[1..8]' = (Ghnf_nap[j] - Gh_nap[j]) / Gh_T_nap[j]
  // #Gs_nap[1..8]' = (Gsnf_nap[j] - Gs_nap[j]) / Gs_T_nap[j]
  // ## K Currents
  // p GV_K = -90
  // # Kv2 Current
  // p Gg_kv2 = 0.1
  // p Gth_m_kv2 = -33.2, Gk_m_kv2 = 9.1
  // p GT0_m_kv2 = 0.1, GT1_m_kv2 = 3.0
  // p Gph_m_kv2 = -33.2, Gmi_m_kv2 = 0.0
  // p Gs0_m_kv2 = 21.7, Gs1_m_kv2 = -13.9
  // p Gth_h_kv2 = -20, Gk_h_kv2 = -10
  // p GT0_h_kv2 = 3400, GT1_h_kv2 = 3400
  // p Gph_h_kv2 = 0, Gmi_h_kv2 = 0.2
  // p Gs0_h_kv2 = 1, Gs1_h_kv2 = 1
  // Gmnf_kv2[1..8] = INFF(GV[j],Gth_m_kv2,Gk_m_kv2,Gmi_m_kv2)
  // Ghnf_kv2[1..8] = INFF(GV[j],Gth_h_kv2,Gk_h_kv2,Gmi_h_kv2)
  // Gm_T_kv2[1..8] = GTAUF(GV[j], GT0_m_kv2, GT1_m_kv2, Gph_m_kv2, Gs0_m_kv2, Gs1_m_kv2)
  // Gh_T_kv2[1..8] = GTAUF(GV[j], GT0_h_kv2, GT1_h_kv2, Gph_h_kv2, Gs0_h_kv2, Gs1_h_kv2)
  // Gm_kv2[1..8](0) = 0.06
  // Gh_kv2[1..8](0) = 1
  // Gm_kv2[1..8]' = (Gmnf_kv2[j] - Gm_kv2[j]) / Gm_T_kv2[j]
  // Gh_kv2[1..8]' = (Ghnf_kv2[j] - Gh_kv2[j]) / Gh_T_kv2[j]
  // # Kv3 Current
  // p Gg_kv3 = 10
  // p Gth_m_kv3 = -26, Gk_m_kv3 = 7.8
  // p GT0_m_kv3 = 0.1, GT1_m_kv3 = 14
  // p Gph_m_kv3 = -26, Gmi_m_kv3 = 0
  // p Gs0_m_kv3 = 13, Gs1_m_kv3 = -12
  // p Gth_h_kv3 = -20, Gk_h_kv3 = -10
  // p GT0_h_kv3 = 7.0, GT1_h_kv3 = 33
  // p Gph_h_kv3 = 0, Gmi_h_kv3 = 0.6
  // p Gs0_h_kv3 = 10, Gs1_h_kv3 = -10
  // Gmnf_kv3[1..8] = INFF(GV[j],Gth_m_kv3,Gk_m_kv3,Gmi_m_kv3)
  // Ghnf_kv3[1..8] = INFF(GV[j],Gth_h_kv3,Gk_h_kv3,Gmi_h_kv3)
  // Gm_T_kv3[1..8] = GTAUF(GV[j], GT0_m_kv3, GT1_m_kv3, Gph_m_kv3, Gs0_m_kv3, Gs1_m_kv3)
  // Gh_T_kv3[1..8] = GTAUF(GV[j], GT0_h_kv3, GT1_h_kv3, Gph_h_kv3, Gs0_h_kv3, Gs1_h_kv3)
  // Gm_kv3[1..8](0) = 0.02
  // Gh_kv3[1..8](0) = 0.99
  // Gm_kv3[1..8]' = (Gmnf_kv3[j] - Gm_kv3[j]) / Gm_T_kv3[j]
  // Gh_kv3[1..8]' = (Ghnf_kv3[j] - Gh_kv3[j]) / Gh_T_kv3[j]
  // # Kv4f Current
  // # COMBINED into Kv4s in reduced version
  // # p Gg_kvf = 2.0
  // # p Gth_m_kvf = -49, Gk_m_kvf = 12.5
  // # p GT0_m_kvf = 0.25, GT1_m_kvf = 7.0
  // # p Gph_m_kvf = -49, Gmi_m_kvf = 0
  // # p Gs0_m_kvf = 29, Gs1_m_kvf = -29
  // # p Gth_h_kvf = -83, Gk_h_kvf = -10
  // # p GT0_h_kvf = 7.0, GT1_h_kvf = 21
  // # p Gph_h_kvf = -83, Gmi_h_kvf = 0
  // # p Gs0_h_kvf = 10, Gs1_h_kvf = -10
  // # Gmnf_kvf[1..8] = INFF(GV[j],Gth_m_kvf,Gk_m_kvf,Gmi_m_kvf)
  // # Ghnf_kvf[1..8] = INFF(GV[j],Gth_h_kvf,Gk_h_kvf,Gmi_h_kvf)
  // # Gm_T_kvf[1..8] = GTAUF(GV[j], GT0_m_kvf, GT1_m_kvf, Gph_m_kvf, Gs0_m_kvf, Gs1_m_kvf)
  // # Gh_T_kvf[1..8] = GTAUF(GV[j], GT0_h_kvf, GT1_h_kvf, Gph_h_kvf, Gs0_h_kvf, Gs1_h_kvf)
  // # Gm_kvf[1..8](0) = .32
  // # Gh_kvf[1..8](0) = .08
  // # Gm_kvf[1..8]' = (Gmnf_kvf[j] - Gm_kvf[j]) / Gm_T_kvf[j]
  // # Gh_kvf[1..8]' = (Ghnf_kvf[j] - Gh_kvf[j]) / Gh_T_kvf[j]
  // # Kv4s Current (before Kv4s added, g = 1.0)
  // p Gg_kvs = 3.0
  // p Gth_m_kvs = -49, Gk_m_kvs = 12.5
  // p GT0_m_kvs = 0.25, GT1_m_kvs = 7.0
  // p Gph_m_kvs = -49, Gmi_m_kvs = 0
  // p Gs0_m_kvs = 29, Gs1_m_kvs = -29
  // p Gth_h_kvs = -83, Gk_h_kvs = -10
  // # Combined tau's of Kv4f (7-21) and Kv4 (50-121)
  // p GT0_h_kvs = 15, GT1_h_kvs = 100
  // p Gph_h_kvs = -83, Gmi_h_kvs = 0
  // p Gs0_h_kvs = 10, Gs1_h_kvs = -10
  // Gmnf_kvs[1..8] = INFF(GV[j],Gth_m_kvs,Gk_m_kvs,Gmi_m_kvs)
  // Ghnf_kvs[1..8] = INFF(GV[j],Gth_h_kvs,Gk_h_kvs,Gmi_h_kvs)
  // Gm_T_kvs[1..8] = GTAUF(GV[j], GT0_m_kvs, GT1_m_kvs, Gph_m_kvs, Gs0_m_kvs, Gs1_m_kvs)
  // Gh_T_kvs[1..8] = GTAUF(GV[j], GT0_h_kvs, GT1_h_kvs, Gph_h_kvs, Gs0_h_kvs, Gs1_h_kvs)
  // Gm_kvs[1..8](0) = .32
  // Gh_kvs[1..8](0) = .08
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  // Terms of use
  // Copyright © 2017 Matthias Koenig
  // Redistributions of this SBML file must retain the above copyright notice, this list of conditions and the following disclaimer.
  // Redistributions in a different form must reproduce the above copyright notice, this list of conditions and the following disclaimer in the documentation and/or other materials provided with the distribution.

  // Parameters:
  dd = 0;
  mq10 = 2.5;
  mtemp1 = 37;
  mcm = 1;
  miapp = 0;
  mv_l = -90;
  mg_leak = 0.075;
  mv_na = 55;
  mg_na = 35;
  mva_m_na = -28;
  mka_m_na = 1;
  mvb_m_na = -53;
  mkb_m_na = 18;
  mva_h_na = -51;
  mka_h_na = 20;
  mvb_h_na = -21;
  mkb_h_na = 1;
  mph_h_na = 5;
  mv_k = -90;
  mg_k = 6;
  mva_n_k = -27;
  mka_n_k = 1;
  mvb_n_k = -37;
  mkb_n_k = 80;
  mph_n_k = 5;
  mv_kir = -90;
  mg_kir = 0.15;
  mth_m_kir = -100;
  mk_m_kir = -10;
  mt0_m_kir = 0.01;
  mv_kaf = -73;
  mg_kaf = 0.09;
  mtemp_kaf = 22;
  mth_m_kaf = -33.1;
  mk_m_kaf = 7.5;
  mt0_m_kaf = 1;
  mth_h_kaf = -70.4;
  mk_h_kaf = -7.6;
  mt0_h_kaf = 25;
  mv_kas = -85;
  mg_kas = 0.32;
  mtemp_kas = 22;
  mth_m_kas = -25.6;
  mk_m_kas = 13.3;
  mt0_m_kas = 131.4;
  mvt_m_kas = -37.4;
  mkt_m_kas = 27.3;
  mth_h_kas = -78.8;
  mk_h_kas = -10.4;
  mvt_h_kas = -38.2;
  mkt_h_kas = 28;
  mv_krp = -77.5;
  mg_krp = 0.42;
  mtemp_krp = 22;
  mth_m_krp = -13.4;
  mk_m_krp = 12.1;
  mt0_m_krp = 206.2;
  mvt_m_krp = -53.9;
  mkt_m_krp = 26.5;
  mth_h_krp = -55;
  mk_h_krp = -19;
  mvt_h_krp = -38.2;
  mkt_h_krp = 28;
  mv_nap = 45;
  mg_nap = 0.02;
  mtemp_nap = 22;
  mth_m_nap = -47.8;
  mk_m_nap = 3.1;
  mt0_m_nap = 1;
  mv_nas = 40;
  mg_nas = 0.11;
  mtemp_nas = 21;
  mth_m_nas = -16;
  mk_m_nas = 9.4;
  mt0_m_nas = 637.8;
  mvt_m_nas = -33.5;
  mkt_m_nas = 26.3;
  gcm = 1;
  giapp = 0;
  gv_l = -60;
  gg_leak = 0.068;
  gv_na = 50;
  gg_naf = 50;
  gth_m_naf = -39;
  gk_m_naf = 5;
  gt0_m_naf = 0.028;
  gt1_m_naf = 0.028;
  gph_m_naf = 0;
  gmi_m_naf = 0;
  gs0_m_naf = 1;
  gs1_m_naf = 1;
  gth_h_naf = -48;
  gk_h_naf = -2.8;
  gt0_h_naf = 0.25;
  gt1_h_naf = 4;
  gph_h_naf = -43;
  gmi_h_naf = 0;
  gs0_h_naf = 10;
  gs1_h_naf = -5;
  gth_s_naf = -40;
  gk_s_naf = -5.4;
  gt0_s_naf = 10;
  gt1_s_naf = 1000;
  gph_s_naf = -40;
  gmi_s_naf = 0.15;
  gs0_s_naf = 18.3;
  gs1_s_naf = -10;
  gg_nap = 0.1;
  gth_m_nap = -57.7;
  gk_m_nap = 5.7;
  gt0_m_nap = 0.03;
  gt1_m_nap = 0.146;
  gph_m_nap = -42.6;
  gmi_m_nap = 0;
  gs0_m_nap = 14.4;
  gs1_m_nap = -14.4;
  gth_h_nap = -57;
  gk_h_nap = -4;
  gt0_h_nap = 10;
  gt1_h_nap = 17;
  gph_h_nap = -34;
  gmi_h_nap = 0.154;
  gs0_h_nap = 26;
  gs1_h_nap = -31.9;
  gv_k = -90;
  gg_kv2 = 0.1;
  gth_m_kv2 = -33.2;
  gk_m_kv2 = 9.1;
  gt0_m_kv2 = 0.1;
  gt1_m_kv2 = 3;
  gph_m_kv2 = -33.2;
  gmi_m_kv2 = 0;
  gs0_m_kv2 = 21.7;
  gs1_m_kv2 = -13.9;
  gth_h_kv2 = -20;
  gk_h_kv2 = -10;
  gt0_h_kv2 = 3400;
  gt1_h_kv2 = 3400;
  gph_h_kv2 = 0;
  gmi_h_kv2 = 0.2;
  gs0_h_kv2 = 1;
  gs1_h_kv2 = 1;
  gg_kv3 = 10;
  gth_m_kv3 = -26;
  gk_m_kv3 = 7.8;
  gt0_m_kv3 = 0.1;
  gt1_m_kv3 = 14;
  gph_m_kv3 = -26;
  gmi_m_kv3 = 0;
  gs0_m_kv3 = 13;
  gs1_m_kv3 = -12;
  gth_h_kv3 = -20;
  gk_h_kv3 = -10;
  gt0_h_kv3 = 7;
  gt1_h_kv3 = 33;
  gph_h_kv3 = 0;
  gmi_h_kv3 = 0.6;
  gs0_h_kv3 = 10;
  gs1_h_kv3 = -10;
  gg_kvs = 3;
  gth_m_kvs = -49;
  gk_m_kvs = 12.5;
  gt0_m_kvs = 0.25;
  gt1_m_kvs = 7;
  gph_m_kvs = -49;
  gmi_m_kvs = 0;
  gs0_m_kvs = 29;
  gs1_m_kvs = -29;
  gth_h_kvs = -83;
  gk_h_kvs = -10;
  gt0_h_kvs = 15;
  gt1_h_kvs = 100;
  gph_h_kvs = -83;
  gmi_h_kvs = 0;
  gs0_h_kvs = 10;
  gs1_h_kvs = -10;
  gg_kv7 = 0.15;
  gth_m_kv7 = -61;
  gk_m_kv7 = 19.5;
  gt0_m_kv7 = 6.7;
  gt1_m_kv7 = 100;
  gph_m_kv7 = -61;
  gmi_m_kv7 = 0;
  gs0_m_kv7 = 35;
  gs1_m_kv7 = -25;
  gv_hcn = -30;
  gg_hcn = 0.1;
  gth_m_hcn = -76.4;
  gk_m_hcn = -3.3;
  gt0_m_hcn = 0;
  gt1_m_hcn = 3625;
  gph_m_hcn = -76.4;
  gmi_m_hcn = 0;
  gs0_m_hcn = 6.56;
  gs1_m_hcn = -7.48;
  gv_ca = 130;
  gg_cah = 0.3;
  gth_m_cah = -20;
  gk_m_cah = 7;
  gt0_m_cah = 0.2;
  gt1_m_cah = 0.2;
  gph_m_cah = 0;
  gmi_m_cah = 0;
  gs0_m_cah = 1;
  gs1_m_cah = 1;
  gav = 3000;
  f = 96485;
  z = 2;
  gk_ca = 0.4;
  gc_ca0 = 0.01;
  gc_ca50 = 0.35;
  gc_ca_sat = 5;
  hcoeff = 4.6;
  gg_ksk = 0.4;
  gm_t0_ksk = 4;
  gm_t1_ksk = 76;
  fc = 1;
  fiapp = 0;
  fv_l = -70;
  fg_l = 0.25;
  fv_na = 50;
  fg_na = 112.5;
  fth_m_na = -24;
  fk_m_na = 11.5;
  fth_h_na = -58.3;
  fk_h_na = -6.7;
  ftt_h_na = -60;
  fkt_h_na = -12;
  fv_k = -90;
  fg_kv3 = 225;
  fth_n_kv3 = -12.4;
  fk_n_kv3 = 6.8;
  fta_n_kv3 = -14.6;
  fka_n_kv3 = -8.6;
  ftb_n_kv3 = 1.3;
  fkb_n_kv3 = 18.7;
  fg_kv1 = 0.1;
  fth_m_kv1 = -50;
  fk_m_kv1 = 20;
  fth_h_kv1 = -70;
  fk_h_kv1 = -6;
  ft_m_kv1 = 2;
  ft_h_kv1 = 150;
  v_i = -80;
  th_hg = -57.8;
  s_hg = 2;
  g_m2m = 0.14;
  a_m2m = 2;
  b_m2m = 0.13;
  th_g_m2m = 52;
  g_g2g = 0.13;
  a_g2g = 2;
  b_g2g = 0.09;
  th_g_g2g = 47;
  g_f2f = 0.11;
  a_f2f = 2;
  b_f2f = 0.18;
  th_g_f2f = 57;
  g_m2g = 0.1;
  a_m2g = 2;
  b_m2g = 0.09;
  th_g_m2g = 57;
  g_g2f = 0.13;
  a_g2f = 2;
  b_g2f = 0.09;
  th_g_g2f = 47;
  g_f2m = 0.15;
  a_f2m = 2;
  b_f2m = 0.1;
  th_g_f2m = 57;
  v_x = 0;
  g_x2g = 0.02;
  g_x2f = 0.095;
  mt_m_kir has dimensionless;
  mt_m_kaf has dimensionless;
  mt_h_kaf has dimensionless;
  mt_m_nap has dimensionless;
  mprate has dimensionless;
  gprate has dimensionless;
  fprate has dimensionless;
  t has dimensionless; t is "model time";

  // Initial assignments:
  None = ran(40) - 80;

  // Assignment rules:
  mt_m_kir := mt0_m_kir;
  mt_m_kaf := mt0_m_kaf/mtadjf(mtemp_kaf, mq10, mtemp1);
  mt_h_kaf := mt0_h_kaf/mtadjf(mtemp_kaf, mq10, mtemp1);
  mt_m_nap := mt0_m_nap/mtadjf(mtemp_nap, mq10, mtemp1);
  // (no variable named) := (gc_ca50/10^6)^hcoeff;
  mprate := ;
  gprate := ;
  fprate := ;
  t := time;
end
