// SBML level 3 version 1

function max(x, y)
  piecewise(x, x > y, y);
end
max is "minimum";

function min(x, y)
  piecewise(x, x < y, y);
end
min is "maximum";

function heav(x)
  piecewise(0, x < 0, 0.5, x == 0, 1, x > 0, 0);
end
heav is "heavyside";

function mod(x, y)
  piecewise(x - y*ceil(x/y), xor(x < 0, y < 0), x - y*floor(x/y));
end
mod is "modulo";

function cab(v)
  8*(v + 0.725)^2;
end

function mb(v)
  17.8 + 47.6*v + 33.8*v*v;
end

function rb(v)
  1.24 + 3.7*v + 3.2*v*v;
end

function um(ve1, ve2)
  (ve1 + ve2)/2;
end

model main()
  // XPP model
  // This model was converted from XPP ode format to SBML using sbmlutils-0.1.5a6.
  // # Kuznetsova and Deth, JCN, 2007
  // # 4-cell network, all-to-all connections: E cells (V1, V2) and I cells (V3, V4)
  // init V1=-0.75 R1=0.26 CA1=0.1 H1=0.1
  // init V2=-0.71 R2=0.26 CA2=0.1 H2=0.1
  // init V3=-0.75 R3=0.26 CA3=0.1
  // init V4=-0.71 R4=0.26 CA4=0.1
  // init F1=0.0 S1=0.0 F2=0.0 S2=0.0 F3=0.0 S3=0.0 F4=0.0 S4=0.0
  // init F5=0.0 S5=0.0 F6=0.0 S6=0.0 F7=0.0 S7=0.0 F8=0.0 S8=0.0
  // init F9=0.0 S9=0.0 F10=0.0 S10=0.0 F11=0.0 S11=0.0 F12=0.0 S12=0.0
  // par Ie1=0.6, Ie2=0.6
  // #continuos input in both E cells
  // par GCA=0.1, GH=4.
  // par TR1=2.2, TR2=2.2
  // par GSYNee=6, GSYNei=6, TSYN=2, W=-0.1
  // #GSYNee=6 or 11
  // par GCAi=0.25
  // par TR3=1.5, TR4=1.5
  // par GSYNi=3, TSYNi=8
  // V1'=-MB(V1)*(V1-0.5)-26.*R1*(V1+0.95)-GCA*CA1*(V1-1.2)-GH*H1*(V1+0.95)-GSYNee*S1*(V1+0.0)-GSYNi*(V1+0.75)*(S2+S3)+Ie1
  // R1'=(1./TR1)*(-R1+RB(V1))
  // CA1'=(1./14.)*(-CA1+CAB(V1))
  // H1'=(1./45.)*(-H1+3.*CA1)
  // F1'=(1./TSYN)*(-F1+heav(V2-W))
  // S1'=(1./TSYN)*(-S1+F1)
  // F2'=(1./TSYNi)*(-F2+heav(V3-W))
  // S2'=(1./TSYNi)*(-S2+F2)
  // F3'=(1./TSYNi)*(-F3+heav(V4-W))
  // S3'=(1./TSYNi)*(-S3+F3)
  // V2'=-MB(V2)*(V2-0.5)-26.*R2*(V2+0.95)-GCA*CA2*(V2-1.2)-GH*H2*(V2+0.95)-GSYNee*S4*(V2+0.0)-GSYNi*(V2+0.75)*(S5+S6)+Ie2
  // R2'=(1./TR2)*(-R2+RB(V2))
  // CA2'=(1./14.)*(-CA2+CAB(V2))
  // H2'=(1./45.)*(-H2+3.*CA2)
  // F4'=(1./TSYN)*(-F4+heav(V1-W))
  // S4'=(1./TSYN)*(-S4+F4)
  // F5'=(1./TSYNi)*(-F5+heav(V3-W))
  // S5'=(1./TSYNi)*(-S5+F5)
  // F6'=(1./TSYNi)*(-F6+heav(V4-W))
  // S6'=(1./TSYNi)*(-S6+F6)
  // V3'=-MB(V3)*(V3-0.5)-26.*R3*(V3+0.95)-GCAi*CA3*(V3-1.2)-GSYNi*S7*(V3+0.75)-GSYNei*(V3+0.0)*(S8+S9)
  // R3'=(1./TR3)*(-R3+RB(V3))
  // CA3'=(1./14.)*(-CA3+CAB(V3))
  // F7'=(1./TSYNi)*(-F7+heav(V4-W))
  // S7'=(1./TSYNi)*(-S7+F7)
  // F8'=(1./TSYN)*(-F8+heav(V1-W))
  // S8'=(1./TSYN)*(-S8+F8)
  // F9'=(1./TSYN)*(-F9+heav(V2-W))
  // S9'=(1./TSYN)*(-S9+F9)
  // V4'=-MB(V4)*(V4-0.5)-26.*R4*(V4+0.95)-GCAi*CA4*(V4-1.2)-GSYNi*S10*(V4+0.75)-GSYNei*(V4+0.0)*(S11+S12)
  // R4'=(1./TR4)*(-R4+RB(V4))
  // CA4'=(1./14.)*(-CA4+CAB(V4))
  // F10'=(1./TSYNi)*(-F10+heav(V4-W))
  // S10'=(1./TSYNi)*(-S10+F10)
  // F11'=(1./TSYN)*(-F11+heav(V1-W))
  // S11'=(1./TSYN)*(-S11+F11)
  // F12'=(1./TSYN)*(-F12+heav(V2-W))
  // S12'=(1./TSYN)*(-S12+F12)
  // CAB(V)=8.*(V+0.725)^2
  // MB(V)=17.8+47.6*V+33.8*V*V
  // RB(V)=1.24+3.7*V+3.2*V*V
  // um(Ve1,Ve2)=(Ve1+Ve2)/2
  // @ METHOD=stiff, TOLERANCE=.00001 BELL=0
  // @ dt=.01, total=600, xplot=t,yplot=CA1
  // @ xmin=0.0,xmax=600,ymin=-1.0,ymax=0.4
  // @ xlo=0.0,ylo=0.0,xhi=600,yhi=0.4,bound=30000,MAXSTOR=400000
  // aux n=um(V1,V2)
  // done
  // This file has been produced by sbmlutils.
  // Terms of use
  // Copyright © 2017 Matthias Koenig
  // Redistribution and use of any part of this model, with or without modification, are permitted provided that the following conditions are met:
  // Redistributions of this SBML file must retain the above copyright notice, this list of conditions and the following disclaimer.
  // Redistributions in a different form must reproduce the above copyright notice, this list of conditions and the following disclaimer in the documentation and/or other materials provided with the distribution.
  // This model is distributed in the hope that it will be useful, but WITHOUT ANY WARRANTY; without even the implied warranty of MERCHANTABILITY or FITNESS FOR A PARTICULAR PURPOSE.

  // Parameters:
  v1 = -0.75;
  r1 = 0.26;
  ca1 = 0.1;
  h1 = 0.1;
  v2 = -0.71;
  r2 = 0.26;
  ca2 = 0.1;
  h2 = 0.1;
  v3 = -0.75;
  r3 = 0.26;
  ca3 = 0.1;
  v4 = -0.71;
  r4 = 0.26;
  ca4 = 0.1;
  f1 = 0;
  s1 = 0;
  f2 = 0;
  s2 = 0;
  f3 = 0;
  s3 = 0;
  f4 = 0;
  s4 = 0;
  f5 = 0;
  s5 = 0;
  f6 = 0;
  s6 = 0;
  f7 = 0;
  s7 = 0;
  f8 = 0;
  s8 = 0;
  f9 = 0;
  s9 = 0;
  f10 = 0;
  s10 = 0;
  f11 = 0;
  s11 = 0;
  f12 = 0;
  s12 = 0;
  ie1 = 0.6;
  ie2 = 0.6;
  gca = 0.1;
  gh = 4;
  tr1 = 2.2;
  tr2 = 2.2;
  gsynee = 6;
  gsynei = 6;
  tsyn = 2;
  w = -0.1;
  gcai = 0.25;
  tr3 = 1.5;
  tr4 = 1.5;
  gsyni = 3;
  tsyni = 8;
  n has dimensionless;
  t has dimensionless; t is "model time";

  // Assignment rules:
  n := um(v1, v2);
  t := time;

  // Rate rules:
  v1' = -mb(v1)*(v1 - 0.5) - 26*r1*(v1 + 0.95) - gca*ca1*(v1 - 1.2) - gh*h1*(v1 + 0.95) - gsynee*s1*(v1 + 0) - gsyni*(v1 + 0.75)*(s2 + s3) + ie1;
  r1' = 1/tr1*(-r1 + rb(v1));
  ca1' = 1/14*(-ca1 + cab(v1));
  h1' = 1/45*(-h1 + 3*ca1);
  f1' = 1/tsyn*(-f1 + heav(v2 - w));
  s1' = 1/tsyn*(-s1 + f1);
  f2' = 1/tsyni*(-f2 + heav(v3 - w));
  s2' = 1/tsyni*(-s2 + f2);
  f3' = 1/tsyni*(-f3 + heav(v4 - w));
  s3' = 1/tsyni*(-s3 + f3);
  v2' = -mb(v2)*(v2 - 0.5) - 26*r2*(v2 + 0.95) - gca*ca2*(v2 - 1.2) - gh*h2*(v2 + 0.95) - gsynee*s4*(v2 + 0) - gsyni*(v2 + 0.75)*(s5 + s6) + ie2;
  r2' = 1/tr2*(-r2 + rb(v2));
  ca2' = 1/14*(-ca2 + cab(v2));
  h2' = 1/45*(-h2 + 3*ca2);
  f4' = 1/tsyn*(-f4 + heav(v1 - w));
  s4' = 1/tsyn*(-s4 + f4);
  f5' = 1/tsyni*(-f5 + heav(v3 - w));
  s5' = 1/tsyni*(-s5 + f5);
  f6' = 1/tsyni*(-f6 + heav(v4 - w));
  s6' = 1/tsyni*(-s6 + f6);
  v3' = -mb(v3)*(v3 - 0.5) - 26*r3*(v3 + 0.95) - gcai*ca3*(v3 - 1.2) - gsyni*s7*(v3 + 0.75) - gsynei*(v3 + 0)*(s8 + s9);
  r3' = 1/tr3*(-r3 + rb(v3));
  ca3' = 1/14*(-ca3 + cab(v3));
  f7' = 1/tsyni*(-f7 + heav(v4 - w));
  s7' = 1/tsyni*(-s7 + f7);
  f8' = 1/tsyn*(-f8 + heav(v1 - w));
  s8' = 1/tsyn*(-s8 + f8);
  f9' = 1/tsyn*(-f9 + heav(v2 - w));
  s9' = 1/tsyn*(-s9 + f9);
  v4' = -mb(v4)*(v4 - 0.5) - 26*r4*(v4 + 0.95) - gcai*ca4*(v4 - 1.2) - gsyni*s10*(v4 + 0.75) - gsynei*(v4 + 0)*(s11 + s12);
  r4' = 1/tr4*(-r4 + rb(v4));
  ca4' = 1/14*(-ca4 + cab(v4));
  f10' = 1/tsyni*(-f10 + heav(v4 - w));
  s10' = 1/tsyni*(-s10 + f10);
  f11' = 1/tsyn*(-f11 + heav(v1 - w));
  s11' = 1/tsyn*(-s11 + f11);
  f12' = 1/tsyn*(-f12 + heav(v2 - w));
  s12' = 1/tsyn*(-s12 + f12);
end
