// SBML level 3 version 1

function max(x, y)
  piecewise(x, x > y, y);
end
max is "minimum";

function min(x, y)
  piecewise(x, x < y, y);
end
min is "maximum";

function heav(x)
  piecewise(0, x < 0, 0.5, x == 0, 1, x > 0, 0);
end
heav is "heavyside";

function mod(x, y)
  piecewise(x - y*ceil(x/y), xor(x < 0, y < 0), x - y*floor(x/y));
end
mod is "modulo";

function foute(v, koutpute, v12outpute)
  1/(1 + exp((v - v12outpute)/koutpute));
end

function fouti(v, koutputi, v12outputi)
  1/(1 + exp((v - v12outputi)/koutputi));
end

function ninf(v, kn, v12n)
  1/(1 + exp((v - v12n)/kn));
end

function mpinf(v, kmp, v12mp)
  1/(1 + exp((v - v12mp)/kmp));
end

function hpinf(v, khp, v12hp)
  1/(1 + exp((v - v12hp)/khp));
end

function tauinf(v, khp, tauhp, v12hp)
  tauhp/cosh((v - v12hp)/(2*khp));
end

function inap(v, h, ena, gnap, kmp, v12mp)
  gnap*mpinf(v, kmp, v12mp)*h*(v - ena);
end

function ikdr(v, ek, gkdr, kn, v12n)
  gkdr*ninf(v, kn, v12n)^4*(v - ek);
end

function iad(v, m, ek, gad)
  gad*m*(v - ek);
end

function il(v, eleak, gl)
  gl*(v - eleak);
end

model main()
  // XPP model
  // This model was converted from XPP ode format to SBML using sbmlutils-0.1.5a6.
  // # RESPIRATORY RHYTHM MODEL
  // # J. Rubin, N. Shevtsova, B. Ermentrout, J. Smith, I. Rybak
  // # J. Neurophysiol. 101:2146-2165, 2009
  // # parameters/initial conditions set to give 3-phase rhythm
  // # general parameters
  // p C=20
  // p gL=2.8
  // p Eleak=-60
  // p gsynE=10
  // p EsynE=0
  // p gsynI=60
  // p EsynI=-75
  // p EK=-85
  // p ENa=50
  // # parameters of NaP and Kdr currents
  // p V12n=-29,kn=-4,gKdr=5,V12mp=-40,kmp=-6
  // p V12hp=-48,khp=6,tauhp=6000,gNaP=5
  // # parameters of adaptive neurons
  // p gAD=10,Tad2=2000,Tad3=1000,Tad4=2000
  // p Kad2=0.9,Kad3=1.3,Kad4=0.9
  // # parameters of output function
  // p V12outpute=-30,Koutpute=-8
  // p V12outputi=-30,Koutputi=-4
  // foute(v)=1./(1+exp((v-V12outpute)/Koutpute))
  // fouti(v)=1./(1+exp((v-V12outputi)/Koutputi))
  // # between neurons
  // p a12=0.4,b23=0.25,b24=0.35,b31=0.3,b32=0.05,b34=0.35
  // p b41=0.2,b42=0.35,b43=0.1
  // p Drive1=1,Drive2=1,Drive3=1
  // p c11=0.115,c12=0.3,c13=0.63,c14=0.33
  // p c21=0.07,c22=0.3,c24=0.4,c31=0.025
  // p nf=1
  // p sdum1=0,sdum2=0,sdum3=0,sdum4=0,edum=0
  // init v1=-60,v2=-60,v3=-60,v4=-60
  // init h=0.35,m2=0,m3=0,m4=0
  // # functions
  // ninf(v)=1./(1+exp((v-V12n)/kn))
  // mpinf(v)=1./(1+exp((v-V12mp)/kmp))
  // hpinf(v)=1./(1+exp((v-V12hp)/khp))
  // tauinf(v)=tauhp/cosh((v-V12hp)/(2*khp))
  // # currents
  // Inap(v,h)=gNaP*mpinf(v)*h*(v-ENa)
  // Ikdr(v)=gKdr*ninf(v)^4*(v-EK)
  // Iad(v,m)=gAD*m*(v-EK)
  // Il(v)=gL*(v-Eleak)
  // # ODEs
  // v1'=(-Inap(v1,h)-Ikdr(v1)-Il(v1)-gsynI*(b31*fouti(v3)+b41*fouti(v4)+sdum1)*(v1-EsynI)-gsynE*(c11*Drive1+c21*Drive2+c31*Drive3)*(v1-EsynE))/C
  // v2'=(-Iad(v2,m2)-Il(v2)-gsynI*(b32*fouti(v3)+b42*fouti(v4)+sdum2)*(v2-EsynI)-gsynE*(a12*foute(v1)+c22*Drive2+c12*Drive1+edum)*(v2-EsynE))/C
  // v3'=(-Iad(v3,m3)-Il(v3)-gsynI*(b23*fouti(v2)+b43*fouti(v4)+sdum3)*(v3-EsynI)-gsynE*(c13*Drive1)*(v3-EsynE))/C
  // v4'=(-Iad(v4,m4)-Il(v4)-gsynI*(b24*fouti(v2)+b34*fouti(v3)+sdum4)*(v4-EsynI)-gsynE*(c14*Drive1+c24*Drive2)*(v4-EsynE))/C
  // h'=(hpinf(v1)-h)/tauinf(v1)
  // m2'=(-m2+Kad2*fouti(v2))/Tad2
  // m3'=(-m3+Kad3*fouti(v3))/Tad3
  // m4'=(-m4+Kad4*fouti(v4))/Tad4
  // aux inh1=b31*fouti(v3)+b41*fouti(v4)
  // aux inh2=b32*fouti(v3)+b42*fouti(v4)
  // aux inh3=b23*fouti(v2)+b43*fouti(v4)
  // aux inh4=b24*fouti(v2)+b34*fouti(v3)
  // aux exc2=a12*foute(v1)
  // @ dt=0.1,total=10000,meth=qualrk,xp=t,yp=v1,xlow=0,xhi=1000,ylo=-80,yhi=20.,bound=5000,maxstor=10000001
  // done
  // This file has been produced by sbmlutils.
  // Terms of use
  // Copyright © 2017 Matthias Koenig
  // Redistribution and use of any part of this model, with or without modification, are permitted provided that the following conditions are met:
  // Redistributions of this SBML file must retain the above copyright notice, this list of conditions and the following disclaimer.
  // Redistributions in a different form must reproduce the above copyright notice, this list of conditions and the following disclaimer in the documentation and/or other materials provided with the distribution.
  // This model is distributed in the hope that it will be useful, but WITHOUT ANY WARRANTY; without even the implied warranty of MERCHANTABILITY or FITNESS FOR A PARTICULAR PURPOSE.

  // Parameters:
  c = 20;
  gl = 2.8;
  eleak = -60;
  gsyne = 10;
  esyne = 0;
  gsyni = 60;
  esyni = -75;
  ek = -85;
  ena = 50;
  v12n = -29;
  kn = -4;
  gkdr = 5;
  v12mp = -40;
  kmp = -6;
  v12hp = -48;
  khp = 6;
  tauhp = 6000;
  gnap = 5;
  gad = 10;
  tad2 = 2000;
  tad3 = 1000;
  tad4 = 2000;
  kad2 = 0.9;
  kad3 = 1.3;
  kad4 = 0.9;
  v12outpute = -30;
  koutpute = -8;
  v12outputi = -30;
  koutputi = -4;
  a12 = 0.4;
  b23 = 0.25;
  b24 = 0.35;
  b31 = 0.3;
  b32 = 0.05;
  b34 = 0.35;
  b41 = 0.2;
  b42 = 0.35;
  b43 = 0.1;
  drive1 = 1;
  drive2 = 1;
  drive3 = 1;
  c11 = 0.115;
  c12 = 0.3;
  c13 = 0.63;
  c14 = 0.33;
  c21 = 0.07;
  c22 = 0.3;
  c24 = 0.4;
  c31 = 0.025;
  nf = 1;
  sdum1 = 0;
  sdum2 = 0;
  sdum3 = 0;
  sdum4 = 0;
  edum = 0;
  v1 = -60;
  v2 = -60;
  v3 = -60;
  v4 = -60;
  h = 0.35;
  m2 = 0;
  m3 = 0;
  m4 = 0;
  inh1 has dimensionless;
  inh2 has dimensionless;
  inh3 has dimensionless;
  inh4 has dimensionless;
  exc2 has dimensionless;
  t has dimensionless; t is "model time";

  // Assignment rules:
  inh1 := b31*fouti(v3, koutputi, v12outputi) + b41*fouti(v4, koutputi, v12outputi);
  inh2 := b32*fouti(v3, koutputi, v12outputi) + b42*fouti(v4, koutputi, v12outputi);
  inh3 := b23*fouti(v2, koutputi, v12outputi) + b43*fouti(v4, koutputi, v12outputi);
  inh4 := b24*fouti(v2, koutputi, v12outputi) + b34*fouti(v3, koutputi, v12outputi);
  exc2 := a12*foute(v1, koutpute, v12outpute);
  t := time;

  // Rate rules:
  v1' = (-inap(v1, h, ena, gnap, kmp, v12mp) - ikdr(v1, ek, gkdr, kn, v12n) - il(v1, eleak, gl) - gsyni*(b31*fouti(v3, koutputi, v12outputi) + b41*fouti(v4, koutputi, v12outputi) + sdum1)*(v1 - esyni) - gsyne*(c11*drive1 + c21*drive2 + c31*drive3)*(v1 - esyne))/c;
  v2' = (-iad(v2, m2, ek, gad) - il(v2, eleak, gl) - gsyni*(b32*fouti(v3, koutputi, v12outputi) + b42*fouti(v4, koutputi, v12outputi) + sdum2)*(v2 - esyni) - gsyne*(a12*foute(v1, koutpute, v12outpute) + c22*drive2 + c12*drive1 + edum)*(v2 - esyne))/c;
  v3' = (-iad(v3, m3, ek, gad) - il(v3, eleak, gl) - gsyni*(b23*fouti(v2, koutputi, v12outputi) + b43*fouti(v4, koutputi, v12outputi) + sdum3)*(v3 - esyni) - gsyne*c13*drive1*(v3 - esyne))/c;
  v4' = (-iad(v4, m4, ek, gad) - il(v4, eleak, gl) - gsyni*(b24*fouti(v2, koutputi, v12outputi) + b34*fouti(v3, koutputi, v12outputi) + sdum4)*(v4 - esyni) - gsyne*(c14*drive1 + c24*drive2)*(v4 - esyne))/c;
  h' = (hpinf(v1, khp, v12hp) - h)/tauinf(v1, khp, tauhp, v12hp);
  m2' = (-m2 + kad2*fouti(v2, koutputi, v12outputi))/tad2;
  m3' = (-m3 + kad3*fouti(v3, koutputi, v12outputi))/tad3;
  m4' = (-m4 + kad4*fouti(v4, koutputi, v12outputi))/tad4;
end
