// SBML level 3 version 1

function max(x, y)
  piecewise(x, x > y, y);
end
max is "min";

function min(x, y)
  piecewise(x, x < y, y);
end
min is "max";

function heav(x)
  piecewise(0, x < 0, 0.5, x == 0, 1, x > 0);
end
heav is "max";

model main()
  // XPP model
  // This model was converted from XPP ode format to SBML using sbmlutils-0.1.5a6.
  // # PARAMETERS
  // p i0=2.5,is=0.0,ton=100,toff=900,A=0.0,f=0.0,B=0.0
  // p gm=1
  // p gnap=0.04,gh=0.05
  // p gna=100.0,gkdr=20.0,gahp=10.0,gl=0.12
  // p Cm=1,Vna=55.0,Vk=-90,Vh=-27.4,Vl=-70
  // p Vsyn=0
  // p THm=-28.0,Km=-7.8,THh=-50.0,Kh=7.0
  // p THn=-23.0,Kn=-15.0
  // p THp=-53.0,Kp=-5.0
  // p THu=-25.0,Ku=-3,tauu=75.0
  // p THz=-45.0,Kz=-4.25,tauz=75.0
  // p THr=-83.9,Kr=7.4
  // #
  // #
  // # INITIAL CONDITIONS
  // V(0)=-67.231830
  // h(0)=0.92141213
  // n(0)=0.0497938
  // z(0)=0.00040176
  // u(0)=0.00040176
  // r(0)=0.095137881
  // #
  // #
  // # FUNCTIONS
  // Ina(V,h)=gna*(minf(V)^3)*h*(V-Vna)
  // minf(V)=1.0/(1.0+exp((V-THm)/Km))
  // hinf(V)=1.0/(1.0+exp((V-THh)/Kh))
  // tauh(V)=30.0/(exp((V+50.0)/15.0)+exp(-(V+50.0)/16.0))
  // #
  // Ikdr(V,n)=gkdr*(n^4)*(V-Vk)
  // ninf(V)=1.0/(1.0+exp((V-THn)/Kn))
  // taun(V)=7.0/(exp((V+40.0)/40.0)+exp(-(V+40.0)/50.0))
  // #
  // Inap(V)=gnap*pinf(V)*(V-Vna)
  // pinf(V)=1.0/(1+exp((V-THp)/Kp))
  // #
  // Im(V,z)=gm*z*(V-Vk)
  // zinf(V)=1.0/(1+exp((V-THz)/Kz))
  // #
  // Iahp(V,u)=gahp*u*(V-Vk)
  // uinf(V)=1.0/(1+exp((V-THu)/Ku))
  // #
  // Ih(V,r)=gh*r*(V-Vh)
  // rinf(V)=1.0/(1+exp((V-THr)/Kr))
  // taur(V)=6000.0/(exp((V+140.0)/21.6)+exp(-(V+40.0)/22.7))
  // #
  // Il(V)=gl*(V-Vl)
  // #
  // Istep(t)=is*heav(t-ton)*heav(toff-t)
  // Icos(t)=i0+A*cos(2*Pi*f*t)
  // Iapp(t)=Istep(t)+Icos(t)
  // aux I = Iapp(t)
  // #
  // #
  // Isyn(V,t)=B*(1+cos(2*Pi*f*t))*(V-Vsyn)
  // #
  // #
  // #
  // # EQUATIONS
  // V'=(-Ina(V,h)-Ikdr(V,n)-Iahp(V,u)-Im(V,z)-Inap(V)-Ih(V,r)-Isyn(V,t)-Il(V)+Iapp(t))/Cm
  // h'=(hinf(v)-h)/tauh(v)
  // n'=(ninf(v)-n)/taun(v)
  // z'=(zinf(v)-z)/tauz
  // u'=(uinf(v)-u)/tauu
  // r'=(rinf(v)-r)/taur(v)
  // #
  // #
  // #
  // #
  // #
  // # xpp formatting
  // @ XP=t
  // @ YP=vs
  // @ TOTAL=3000,DT=0.01
  // @ MAXSTOR=8000000,BOUNDS=10000,method=runge-kutta
  // @ xlo=0,xhi=3000,ylo=-92,yhi=53
  // #
  // @ NTST=250,NMAX=55000,NPR=50
  // @ DS=0.2,DSMIN=0.001,DSMAX=0.3
  // @ PARMIN=-30,PARMAX=400,NORMMIN=0.0,NORMMAX=10000.0
  // @ AUTOVAR=vs,AUTOXMIN=-25.0,AUTOXMAX=400.0,AUTOYMIN=-80.0,AUTOYMAX=55.0
  // done
  // This file has been produced by sbmlutils.
  // Terms of use
  // Copyright © 2017 Matthias Koenig
  // Redistribution and use of any part of this model, with or without modification, are permitted provided that the following conditions are met:
  // Redistributions of this SBML file must retain the above copyright notice, this list of conditions and the following disclaimer.
  // Redistributions in a different form must reproduce the above copyright notice, this list of conditions and the following disclaimer in the documentation and/or other materials provided with the distribution.
  // This model is distributed in the hope that it will be useful, but WITHOUT ANY WARRANTY; without even the implied warranty of MERCHANTABILITY or FITNESS FOR A PARTICULAR PURPOSE.

  // Parameters:
  i0 = 2.5;
  is = 0;
  ton = 100;
  toff = 900;
  A = 0;
  f = 0;
  B = 0;
  gm = 1;
  gnap = 0.04;
  gh = 0.05;
  gna = 100;
  gkdr = 20;
  gahp = 10;
  gl = 0.12;
  Cm = 1;
  Vna = 55;
  Vk = -90;
  Vh = -27.4;
  Vl = -70;
  Vsyn = 0;
  THm = -28;
  Km = -7.8;
  THh = -50;
  Kh = 7;
  THn = -23;
  Kn = -15;
  THp = -53;
  Kp = -5;
  THu = -25;
  Ku = -3;
  tauu = 75;
  THz = -45;
  Kz = -4.25;
  tauz = 75;
  THr = -83.9;
  Kr = 7.4;
  V = -67.23183;
  h = 0.92141213;
  n = 0.0497938;
  z = 0.00040176;
  u = 0.00040176;
  r = 0.095137881;
  I has dimensionless;

  // Assignment rules:
  // (no variable named) := gna*minf(V)^3*h*(V - Vna);
  // (no variable named) := 1/(1 + exp((V - THm)/Km));
  // (no variable named) := 1/(1 + exp((V - THh)/Kh));
  // (no variable named) := 30/(exp((V + 50)/15) + exp(-(V + 50)/16));
  // (no variable named) := gkdr*n^4*(V - Vk);
  // (no variable named) := 1/(1 + exp((V - THn)/Kn));
  // (no variable named) := 7/(exp((V + 40)/40) + exp(-(V + 40)/50));
  // (no variable named) := gnap*pinf(V)*(V - Vna);
  // (no variable named) := 1/(1 + exp((V - THp)/Kp));
  // (no variable named) := gm*z*(V - Vk);
  // (no variable named) := 1/(1 + exp((V - THz)/Kz));
  // (no variable named) := gahp*u*(V - Vk);
  // (no variable named) := 1/(1 + exp((V - THu)/Ku));
  // (no variable named) := gh*r*(V - Vh);
  // (no variable named) := 1/(1 + exp((V - THr)/Kr));
  // (no variable named) := 6000/(exp((V + 140)/21.6) + exp(-(V + 40)/22.7));
  // (no variable named) := gl*(V - Vl);
  // (no variable named) := is*heav(t - ton)*heav(toff - t);
  // (no variable named) := i0 + A*cos(2*pi*f*t);
  // (no variable named) := Istep(t) + Icos(t);
  I := Iapp(t);
  // (no variable named) := B*(1 + cos(2*pi*f*t))*(V - Vsyn);

  // Rate rules:
  V' = (-Ina(V, h) - Ikdr(V, n) - Iahp(V, u) - Im(V, z) - Inap(V) - Ih(V, r) - Isyn(V, t) - Il(V) + Iapp(t))/Cm;
  h' = (hinf(v) - h)/tauh(v);
  n' = (ninf(v) - n)/taun(v);
  z' = (zinf(v) - z)/tauz;
  u' = (uinf(v) - u)/tauu;
  r' = (rinf(v) - r)/taur(v);
end
